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/batch
! ANSYS input file written by Workbench version 2022 R1
! File used for geometry attach: F:\墨然的需要\学科竞赛和科研\水下机器人及推进器项目\毕业设计\Ansys校核\啮合校核.STEP
/title,niehe--__ (A5)
/com,--- Data in consistent MKS units. See Solving Units in the help system for more information.
/units,MKS
/prep7
! Turn off shape checking because checks already performed inside WB mesher.
! See help system for more information.
SHPP,OFF,,NOWARN
etcon,set             ! allow ANSYS to choose best KEYOP's for 180x elements, resets any applicable keyopt to MAPDL defaults
/com,*********** Nodes for the whole assembly ***********
nblock,3,,21221
(1i9,3e20.9e3)
        1     9.641862784E-02     9.368548013E-19    -1.130655295E-01
        2     1.016515360E-01     0.000000000E+00    -1.274428266E-01
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-1
/com,*********** Nodes for all Remote Points ***********
nblock,3
(1i9,3e20.9e3)
    19293    -3.100000000E-02     1.419999981E-17     1.159999990E-02
    19294    -3.100000000E-02     1.419999981E-17     1.159999990E-02
    19295     0.000000000E+00     0.000000000E+00     1.750000000E-02
    19296     0.000000000E+00     0.000000000E+00     1.750000000E-02
-1
/com,*********** Elements for Body 1 "___2" ***********
et,1,187
eblock,19,solid,,6057
(19i9)
        1        1        1        1        0        0        0        0       10        0        1      884     1775     1255     1398     7453     9122     7447     7448
     9837     9120
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-1
/com,*********** Elements for Body 2 "___1" ***********
et,2,187
eblock,19,solid,,4697
(19i9)
        2        2        2        2        0        0        0        0       10        0     6058    12169    12317    12285    12307    18996    19222    18994    18995
    19248    19220
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-1
/com,*********** Send User Defined Coordinate System(s) ***********
local,12,0,-3.1e-002,1.41999998092651e-017,1.15999999046326e-002,0.,-1.14591559026165e-013,0.
local,13,0,0.,0.,1.75e-002,-180.,0.,-180.
csys,0
toffst,273.15,  ! Temperature offset from absolute zero
/com,*********** Set Reference Temperature ***********
tref,22.
/com,*********** Send Materials ***********
Temperature = 'TEMP' ! Temperature
MP,DENS,1,1030,	! kg m^-3
MP,EX,1,1628000000,	! Pa
MP,NUXY,1,0.4089,
MP,ALPX,1,0.000184,	! C^-1
MP,KXX,1,0.1997,	! W m^-1 C^-1
MP,C,1,1400,	! J kg^-1 C^-1

Temperature = 'TEMP' ! Temperature
MP,DENS,2,1030,	! kg m^-3
MP,EX,2,1628000000,	! Pa
MP,NUXY,2,0.4089,
MP,ALPX,2,0.000184,	! C^-1
MP,KXX,2,0.1997,	! W m^-1 C^-1
MP,C,2,1400,	! J kg^-1 C^-1

!************************* Model Summary ********************
!___2,	塑性，ABS（高冲击）,	matid,	1
!___1,	塑性，ABS（高冲击）,	matid,	2
!************************* End Model Summary ********************
/com,*********** Create Contact "摩擦的 - 主动轮 至 从动轮" ***********
*set,tid,4
*set,cid,3
r,tid
r,cid
et,tid,170
et,cid,174
eblock,10,,,134
(15i9)
    15193        4        4        4        0    11237    12352    11238    11238    13578    13587    11238    13566
    15194        4        4        4        0    11237    11486    12352    12352    13568    15538    12352    13578
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-1
eblock,10,,,134
(15i9)
    15327        3        3        3        0    11237    12352    11238    11238    13578    13587    11238    13566
    15328        3        3        3        0    11237    11486    12352    12352    13568    15538    12352    13578
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-1
eblock,10,,,206
(15i9)
    15461        3        4        3        0      686      214      489      489     3588     3585      489     5335
    15462        3        4        3        0      489      214      213      213     3585     3574      213     3578
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-1
eblock,10,,,206
(15i9)
    15667        4        3        4        0      686      214      489      489     3588     3585      489     5335
    15668        4        3        4        0      489      214      213      213     3585     3574      213     3578
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-1
keyo,cid,8,2               ! auto create asymmetric contact (from Program Controlled setting)
keyo,cid,10,0              ! adjust contact stiffness each NR iteration (from Program Controlled setting)
keyo,cid,12,0              ! standard contact
mp,mu,cid,0.15      ! unitless
keyo,cid,2,0               ! augmented Lagrange (from Program Controlled setting)
keyo,cid,4,0               ! on Gauss point (from Program Controlled setting)
keyo,cid,9,0               ! use real geometry with stepped effects
keyo,cid,7,1               ! Automatic Bisection
rmod,tid,3,1.       ! FKN
rmod,tid,5,0.       ! ICONT
rmod,tid,6,0.       ! PINB
rmod,tid,10,0.      ! CNOF
rmod,tid,12,0.      ! FKT
rmod,tid,36,45      ! WB DSID
rmod,cid,3,1.       ! FKN
rmod,cid,5,0.       ! ICONT
rmod,cid,6,0.       ! PINB
rmod,cid,10,0.      ! CNOF
rmod,cid,12,0.      ! FKT
rmod,cid,36,45      ! WB DSID
nsel,all
esel,all
/com,*********** Send Named Selection as Node Component ***********
CMBLOCK,_________,NODE,      918
(8i10)
        92        96       208       209       210       211       212       213
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/com,*********** Send Named Selection as Node Component ***********
CMBLOCK,_________,NODE,      518
(8i10)
     11101     11102     11104     11107     11109     11112     11113     11114
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/com,*********** Create Remote Point "内部远程点 2" ***********
! -------- Remote Point Used by "回转 - 接地 至 主动轮1" --------
*set,tid,6
*set,cid,5
et,cid,174
et,tid,170
keyo,tid,2,1               ! Don't fix the pilot node
keyo,tid,4,0               ! Activate all DOF's due to large deformation
keyo,cid,12,5              ! Bonded Contact
keyo,cid,4,2               ! Rigid CERIG style load
keyo,cid,2,2               ! MPC style contact
eblock,10,,,77
(15i9)
    15873        5        5        5        0    11184    12387    11834    11834    13143    17340    11834    13136
    15874        5        5        5        0    11182    11180    11830    11830    13110    13114    11830    13122
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-1
*set,_npilot,19294
_npilot51=_npilot
type,tid
mat ,cid
real,cid
tshape,pilo
en,15950,_npilot
tshape
/com,*********** Create Remote Point "内部远程点 4" ***********
! -------- Remote Point Used by "回转 - 接地 至 从动轮2" --------
*set,tid,8
*set,cid,7
et,cid,174
et,tid,170
keyo,tid,2,1               ! Don't fix the pilot node
keyo,tid,4,0               ! Activate all DOF's due to large deformation
keyo,cid,12,5              ! Bonded Contact
keyo,cid,4,2               ! Rigid CERIG style load
keyo,cid,2,2               ! MPC style contact
eblock,10,,,95
(15i9)
    15951        7        7        7        0       78      891     1156     1156     2515     7483     1156     2517
    15952        7        7        7        0       89       73      903      903     2487     2491      903     2545
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-1
*set,_npilot,19296
_npilot59=_npilot
type,tid
mat ,cid
real,cid
tshape,pilo
en,16046,_npilot
tshape
csys,13
nrot,19296
csys,0
/com,*********** Create Joint "回转 - 接地 至 主动轮1" ***********
! Joint Element Type Declaration and Definition using MPC184
*set,_jid,9
et,_jid,184
keyo,_jid,1,6           ! Revolute Joint
keyo,_jid,4,1           ! Z Axis is revolute axis
sectype,_jid, joint, revo, _wbjoint
secjoint,,12,12
mat,_jid
real,_jid
type,_jid
secnum,_jid
en,15187,,19294        ! body to ground joint
/com,*********** Create Joint "回转 - 接地 至 从动轮2" ***********
! Joint Element Type Declaration and Definition using MPC184
*set,_jid,10
et,_jid,184
keyo,_jid,1,6           ! Revolute Joint
keyo,_jid,4,1           ! Z Axis is revolute axis
sectype,_jid, joint, revo, _wbjoint
secjoint,,13,13
mat,_jid
real,_jid
type,_jid
secnum,_jid
en,15188,,19296        ! body to ground joint
et,11,14             ! spring element type
/com,*********** Construct Weak Springs, Prototype 1 ***********
*set,_delta,1.44880000075847e-002
type,11
mat,12
real,12
r,12,5.91609964081856e-003
nsel,all
*get,_nspr,ndmx
_nspr=_nspr+1
esel,s,type,,1
nsle,s,active
*get,_minx,node,0,mnloc,x
*get,_miny,node,0,mnloc,y
*get,_minz,node,0,mnloc,z
*get,_maxx,node,0,mxloc,x
*get,_maxy,node,0,mxloc,y
*get,_maxz,node,0,mxloc,z
*dim,_ntets,arra,8
_ntets(1) = NODE(_minx,_miny,_minz)
_ntets(2) = NODE(_minx,_miny,_maxz)
_ntets(3) = NODE(_minx,_maxy,_minz)
_ntets(4) = NODE(_minx,_maxy,_maxz)
_ntets(5) = NODE(_maxx,_miny,_minz)
_ntets(6) = NODE(_maxx,_miny,_maxz)
_ntets(7) = NODE(_maxx,_maxy,_minz)
_ntets(8) = NODE(_maxx,_maxy,_maxz)
*do,_i,1,8
  n,_nspr,nx(_ntets(_i))+_delta,ny(_ntets(_i)),nz(_ntets(_i))
  e,_ntets(_i),_nspr
  d,_nspr,all
  _nspr=_nspr+1
  n,_nspr,nx(_ntets(_i)),ny(_ntets(_i))+_delta,nz(_ntets(_i))
  e,_ntets(_i),_nspr
  d,_nspr,all
  _nspr=_nspr+1
  n,_nspr,nx(_ntets(_i)),ny(_ntets(_i)),nz(_ntets(_i))+_delta
  e,_ntets(_i),_nspr
  d,_nspr,all
  _nspr=_nspr+1
*enddo
*set,_ntets
nsel,all
esel,all
/com,*********** Construct Weak Springs, Prototype 2 ***********
*set,_delta,3.91536996272063e-003
type,11
mat,13
real,13
r,13,2.28634736911471e-003
nsel,all
*get,_nspr,ndmx
_nspr=_nspr+1
esel,s,type,,2
nsle,s,active
*get,_minx,node,0,mnloc,x
*get,_miny,node,0,mnloc,y
*get,_minz,node,0,mnloc,z
*get,_maxx,node,0,mxloc,x
*get,_maxy,node,0,mxloc,y
*get,_maxz,node,0,mxloc,z
*dim,_ntets,arra,8
_ntets(1) = NODE(_minx,_miny,_minz)
_ntets(2) = NODE(_minx,_miny,_maxz)
_ntets(3) = NODE(_minx,_maxy,_minz)
_ntets(4) = NODE(_minx,_maxy,_maxz)
_ntets(5) = NODE(_maxx,_miny,_minz)
_ntets(6) = NODE(_maxx,_miny,_maxz)
_ntets(7) = NODE(_maxx,_maxy,_minz)
_ntets(8) = NODE(_maxx,_maxy,_maxz)
*do,_i,1,8
  n,_nspr,nx(_ntets(_i))+_delta,ny(_ntets(_i)),nz(_ntets(_i))
  e,_ntets(_i),_nspr
  d,_nspr,all
  _nspr=_nspr+1
  n,_nspr,nx(_ntets(_i)),ny(_ntets(_i))+_delta,nz(_ntets(_i))
  e,_ntets(_i),_nspr
  d,_nspr,all
  _nspr=_nspr+1
  n,_nspr,nx(_ntets(_i)),ny(_ntets(_i)),nz(_ntets(_i))+_delta
  e,_ntets(_i),_nspr
  d,_nspr,all
  _nspr=_nspr+1
*enddo
*set,_ntets
nsel,all
esel,all
/com,*********** Create Joint Drivers **********

*DIM,_loadvari73,TABLE,2,1,1,TIME
! Time values
*TAXIS,_loadvari73(1),1,0.,1.
! Load values
_loadvari73(1,1,1) = 0.
_loadvari73(2,1,1) = 3.14


fini
/com,****************************************************************************
/com,*************************    SOLUTION       ********************************
/com,****************************************************************************
/solu
antype,4                   ! transient analysis
nlgeom,on                  ! Turn on Large Deformation Effects
kbc,1                      ! stepped BC's
_thickRatio=  1     ! Ratio of thick parts in the model
eqsl,pcg,1e-8,,,,,,1
cntr,print,1               ! print out contact info and also make no initial contact an error
dmpoption,emat,no             ! Don't combine emat file for DANSYS
dmpoption,esav,no             ! Don't combine esav file for DANSYS
trnopt,full,,,,,hht        ! HHT time integration method
tintp, mosp			! Choose transient integration settings for moderate speed application
nldiag,cont,iter           ! print out contact info each equilibrium iteration
rescontrol,define,last,last,,dele	   ! Program Controlled
/com,****************************************************
/com,******************* SOLVE FOR LS 1 OF 1 ****************
esel,s,type,,9
dj,all,omgz,%_loadvari73%
esel,all
esel,s,type,,10
fj,all,mz,3.5
esel,all
autots,on                   ! User turned on automatic time stepping
nsub,5,10,2,OFF
time,1.
timint,on                  ! Turn on time integration effects
outres,erase
outres,all,none
outres,nsol,all,
outres,rsol,all
outres,eangl,all
outres,etmp,all
outres,veng,all
outres,strs,all,
outres,epel,all,
outres,eppl,all,
outres,cont,all,
outres,v,all,
outres,a,all,
esel,s,type,,9
esel,a,type,,10
cm,_elmisc,elem
esel,all
outres,misc,all,_elmisc
! *********** WB SOLVE COMMAND ***********
! check interactive state
*get,ANSINTER_,active,,int
*if,ANSINTER_,ne,0,then
/eof
*endif
solve
/com *************** Write FE CONNECTORS *********
CEWRITE,file,ce,,INTE
/com,****************************************************
/com,*************** FINISHED SOLVE FOR LS 1 *************
*get,_PCGITER,active,,solu,cgiter
/post1
fini
