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/batch
! ANSYS input file written by Workbench version 2022 R1
! File used for geometry attach: F:\墨然的需要\学科竞赛和科研\水下机器人及推进器项目\毕业设计\Ansys校核\受压关键零件校核.STEP
/title,______--____ (A5)
/com,--- Data in consistent MKS units. See Solving Units in the help system for more information.
/units,MKS
/prep7
! Turn off shape checking because checks already performed inside WB mesher.
! See help system for more information.
SHPP,OFF,,NOWARN
etcon,set             ! allow ANSYS to choose best KEYOP's for 180x elements, resets any applicable keyopt to MAPDL defaults
/com,*********** Nodes for the whole assembly ***********
nblock,3,,9575
(1i9,3e20.9e3)
        1     0.000000000E+00     3.500000000E-02    -1.000000000E-02
        2     1.224646799E-18     3.500000000E-02     1.000000000E-02
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-1
/com,*********** Elements for Body 1 "________-FreeParts|____-____3" ***********
et,1,187
eblock,19,solid,,5106
(19i9)
        1        1        1        1        0        0        0        0       10        0        1      714     1145     1334     1315     6316     8369     6321     6319
     8368     8699
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-1
/com,*********** Send User Defined Coordinate System(s) ***********
csys,0
toffst,273.15,  ! Temperature offset from absolute zero
/com,*********** Set Reference Temperature ***********
tref,22.
/com,*********** Send Materials ***********
Temperature = 'TEMP' ! Temperature
MP,DENS,1,2770,	! kg m^-3
MP,ALPX,1,2.3e-05,	! C^-1
MP,C,1,875,	! J kg^-1 C^-1
MPTEMP,,,,,,,,
MPTEMP,1,-100
MPTEMP,2,0
MPTEMP,3,100
MPTEMP,4,200
MPDATA,KXX,1, ,114,144,165,175,	! W m^-1 C^-1
MPTEMP,,,,,,,,
MPTEMP,,,,,,,,
MPTEMP,1,0
MPTEMP,2,20
MPTEMP,3,100
MPDATA,RSVX,1, ,2.43e-08,2.67e-08,3.63e-08,	! kg m^3 A^-2 s^-3
MPTEMP,,,,,,,,
MP,EX,1,71000000000,	! Pa
MP,NUXY,1,0.33,
MP,MURX,1,1,

!************************* Model Summary ********************
!________-FreeParts|____-____3,	铝合金,	matid,	1
!************************* End Model Summary ********************
/com,*********** Fixed Supports ***********
CMBLOCK,_FIXEDSU,NODE,      549
(8i10)
        57        58        59        60        65        66        67        68
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cmsel,s,_FIXEDSU
d,all,all
nsel,all
/com,*********** Define Pressure Using Surface Effect Elements "__" ***********
et,2,154
eblock,10,,,142
(15i9)
     6949        2        2        2        0       48      272      271      271     1715     3436      271     1714
     6950        2        2        2        0       47      272       48       48     1709     1715       48     1708
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-1
esel,s,type,,2
keyop,2,7,0                ! Use deformed area for application of load
esel,all
/com,*********** Define Force Using Surface Effect Elements ***********
local,12,0,0.,0.,0.,0.,0.,0.
csys,0
et,3,154
eblock,10,,,238
(15i9)
     7091        3        3        3       12      718      740      760      760     6355     6527      760     6356
     7092        3        3        3       12      718      764      740      740     6357     6528      740     6355
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-1
esel,s,type,,3
keyop,3,2,1                ! Apply load in local coordinate system
keyop,3,7,1                ! Use original area so load is constant in large deformation
esel,all
/com,*********** Define Force Using Surface Effect Elements ***********
local,13,0,0.,0.,0.,0.,0.,0.
csys,0
et,4,154
eblock,10,,,238
(15i9)
     7329        4        4        4       13      718      740      760      760     6355     6527      760     6356
     7330        4        4        4       13      718      764      740      740     6357     6528      740     6355
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-1
esel,s,type,,4
keyop,4,2,1                ! Apply load in local coordinate system
keyop,4,7,1                ! Use original area so load is constant in large deformation
esel,all
/com,*********** Define Force Using Surface Effect Elements ***********
local,14,0,0.,0.,0.,0.,0.,0.
csys,0
et,5,154
eblock,10,,,238
(15i9)
     7567        5        5        5       14      718      740      760      760     6355     6527      760     6356
     7568        5        5        5       14      718      764      740      740     6357     6528      740     6355
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-1
esel,s,type,,5
keyop,5,2,1                ! Apply load in local coordinate system
keyop,5,7,1                ! Use original area so load is constant in large deformation
esel,all
esel,all
fini
/com,****************************************************************************
/com,*************************    SOLUTION       ********************************
/com,****************************************************************************
/solu
antype,0                   ! static analysis
_thickRatio=  1     ! Ratio of thick parts in the model
eqsl,pcg,1e-8,,,,,,1
cntr,print,1               ! print out contact info and also make no initial contact an error
dmpoption,emat,no             ! Don't combine emat file for DANSYS
dmpoption,esav,no             ! Don't combine esav file for DANSYS
nldiag,cont,iter           ! print out contact info each equilibrium iteration
rescontrol,,none                 ! Do not keep any restart files
/com,****************************************************
/com,******************* SOLVE FOR LS 1 OF 1 ****************
esel,s,type,,2
nsle
sf,all,pres,107265.
nsel,all
esel,all
esel,s,type,,3
nsle
sfe,all,1,pres,1,0.
sfe,all,2,pres,1,-1303764.5669338
sfe,all,3,pres,1,0.
esel,s,type,,4
nsle
sfe,all,1,pres,1,0.
sfe,all,2,pres,1,-1303764.5669338
sfe,all,3,pres,1,0.
esel,s,type,,5
nsle
sfe,all,1,pres,1,0.
sfe,all,2,pres,1,-1303764.5669338
sfe,all,3,pres,1,0.
nsel,all
esel,all
acel,0.,9.80665,0.
esel,all
nsub,1,1,1
time,1.
outres,erase
outres,all,none
outres,nsol,all,
outres,rsol,all
outres,eangl,all
outres,etmp,all
outres,veng,all
outres,strs,all,
outres,epel,all,
outres,eppl,all,
outres,cont,all,
! *********** WB SOLVE COMMAND ***********
! check interactive state
*get,ANSINTER_,active,,int
*if,ANSINTER_,ne,0,then
/eof
*endif
solve
/com *************** Write FE CONNECTORS *********
CEWRITE,file,ce,,INTE
/com,****************************************************
/com,*************** FINISHED SOLVE FOR LS 1 *************
*get,_PCGITER,active,,solu,cgiter
/post1
fini
